include		scripts/vars.Fe3O4

units		real
atom_style	charge

boundary	p p p

read_data	data_init/Fe3O4_ovito.lmp
change_box	all x scale ${scale} y scale ${scale} z scale ${scale} remap
replicate	2 2 2

pair_style	reax/c data_init/lmp_control
pair_coeff	* * data_init/ffield.reax.Fe_O_C_H Fe O

neighbor	2 bin
neigh_modify	every 10 delay 0 check no

velocity	all create $T 42

compute		temp all temp
compute		press all pressure temp

timestep	${time_step}

thermo_style	custom step temp etotal press
thermo		${out}

dump		ovito all atom ${out} output/dumps/dump_${T}_${scale}.atom

fix		verle all nve
fix		reax all qeq/reax 1 0.0 10.0 1.0e-6 reax/c
fix		thermostat all temp/csvr $T $T ${thermo_relax} 239

run		${thermo_steps}
write_restart	output/restarts/Fe3O4_${T}_${scale}.restart

unfix		thermostat
fix		output all print ${out} "${scale},$(c_temp),$(c_press)" file output/data/data_${T}_${scale}.csv screen no title ""

run		${free_steps}
write_restart	output/restarts/Fe3O4_${T}_${scale}.restart
